**
** Heading +++++++++++++++++++++++++++++++++++++++++++++++++
**
*Heading
Hash: KUlazBdF, Date: 03/19/2025, Unit system: MM_TON_S_C
**
** Nodes +++++++++++++++++++++++++++++++++++++++++++++++++++
**
*Node
1, -1.35675000E+003, -1.60000000E+003, 8.68500000E+002
2, -1.35675000E+003, -8.00000000E+002, 8.68500000E+002
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**
** Elements ++++++++++++++++++++++++++++++++++++++++++++++++
**
*Element, Type=S4, Elset=From_parts-1
1, 1, 20, 143, 5
2, 20, 21, 144, 143
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*Element, Type=S3, Elset=Compound-4
8306, 8625, 8657, 9048
8307, 8657, 8658, 10201
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**
** Node sets +++++++++++++++++++++++++++++++++++++++++++++++
**
*Nset, Nset=Internal_Selection-1_Rigid_Body-2
1, 2, 3, 4, 5, 6
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*Nset, Nset=Internal_Selection-1_Rigid_Body-1
8641, 8642, 8643, 8644, 8645, 8646
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*Nset, Nset=Reference_Point-1_ref_29390
29390
*Nset, Nset=Reference_Point-1_rot_29391
29391
*Nset, Nset=Reference_Point-2_ref_29392
29392
*Nset, Nset=Reference_Point-2_rot_29393
29393
*Nset, Nset=Internal_Selection-1_Velocity-1_fromEl
8625, 8626, 8627, 8628, 8629, 8630
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**
** Element sets ++++++++++++++++++++++++++++++++++++++++++++
**
*Elset, Elset=Internal_Selection-1_Velocity-1
Compound-4
**
** Surfaces ++++++++++++++++++++++++++++++++++++++++++++++++
**
**
** Physical constants ++++++++++++++++++++++++++++++++++++++
**
**
** Materials +++++++++++++++++++++++++++++++++++++++++++++++
**
** Name: S185: Deactivated
*Material, Name=6061_Alloy
*Density
2.7E-09
*Elastic
69000, 0.33
*Expansion, Zero=20
2.4E-05
*Conductivity
170
*Specific heat
1300000000
*Material, Name=Concrete
*Density
2E-09
*Elastic
20000000, 0.3
**
** Sections ++++++++++++++++++++++++++++++++++++++++++++++++
**
*Shell section, Elset=Compound-4, Material=6061_Alloy, Offset=0
8
*Shell section, Elset=From_parts-1, Material=Concrete, Offset=0
1
**
** Pre-tension sections ++++++++++++++++++++++++++++++++++++
**
**
** Constraints +++++++++++++++++++++++++++++++++++++++++++++
**
*Rigid body, Nset=Internal_Selection-1_Rigid_Body-2, Ref node=29392, Rot node=29393
*Rigid body, Nset=Internal_Selection-1_Rigid_Body-1, Ref node=29390, Rot node=29391
**
** Surface interactions ++++++++++++++++++++++++++++++++++++
**
*Surface interaction, Name=RADIOSS_GENERAL
*Surface behavior, Pressure-overclosure=Hard
**
** Contact pairs +++++++++++++++++++++++++++++++++++++++++++
**
**
** Amplitudes ++++++++++++++++++++++++++++++++++++++++++++++
**
**
** Initial conditions ++++++++++++++++++++++++++++++++++++++
**
** Name: Velocity-1
*Initial conditions, Type=Velocity
Internal_Selection-1_Velocity-1_fromEl, 2, -9722
Reference_Point-1_ref_29390, 2, -9722
**
** Steps +++++++++++++++++++++++++++++++++++++++++++++++++++
**
**
** Step-1 ++++++++++++++++++++++++++++++++++++++++++++++++++
**
*Step, Inc=100
*Dynamic, Explicit=3
1E-07, 0.05, 1E-07, 1E+30
**
** Controls ++++++++++++++++++++++++++++++++++++++++++++++++
**
**
** Output frequency ++++++++++++++++++++++++++++++++++++++++
**
*Output, Frequency=1
**
** Boundary conditions +++++++++++++++++++++++++++++++++++++
**
*Boundary, op=New
** Name: Fixed-1
*Boundary
29392, 1, 3, 0
29393, 1, 3, 0
** Name: Displacement_Rotation-1
*Boundary
29390, 1, 1, 0
29390, 3, 3, 0
29391, 1, 1, 0
29391, 2, 2, 0
29391, 3, 3, 0
**
** Loads +++++++++++++++++++++++++++++++++++++++++++++++++++
**
*Cload, op=New
*Dload, op=New
**
** Defined fields ++++++++++++++++++++++++++++++++++++++++++
**
**
** History outputs +++++++++++++++++++++++++++++++++++++++++
**
**
** Field outputs +++++++++++++++++++++++++++++++++++++++++++
**
*Node file
RF, U, V
*El file
S, E, ENER, NOE
**
** End step ++++++++++++++++++++++++++++++++++++++++++++++++
**
*End step
