**
** Heading +++++++++++++++++++++++++++++++++++++++++++++++++
**
*Heading
Hash: ZlubEQWP, Date: 02/16/2025, Unit system: MM_TON_S_C
**
** Nodes +++++++++++++++++++++++++++++++++++++++++++++++++++
**
*Node
1, 3.00000000E-016, 0.00000000E+000, -5.00000000E+000
2, 3.00000000E-016, 0.00000000E+000, 5.00000000E+000
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**
** Elements ++++++++++++++++++++++++++++++++++++++++++++++++
**
*Element, Type=C3D4, Elset=Solid_part-2
1, 382, 381, 476, 475
2, 411, 404, 416, 485
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*Element, Type=C3D4, Elset=Solid_part-1
1660, 3695, 565, 566, 515
1661, 3075, 5913, 5782, 5739
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**
** Node sets +++++++++++++++++++++++++++++++++++++++++++++++
**
*Nset, Nset=Internal_Selection-1_Rigid_Body-1
495, 496, 497, 498, 499, 500
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*Nset, Nset=Internal-1_Internal_Selection-1_Contact_Pair-1_Master
1, 2, 3, 4, 5, 6
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*Nset, Nset=Internal-1_Internal_Selection-1_Contact_Pair-1_Slave
495, 496, 497, 498, 499, 500
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*Nset, Nset=Reference_Point-1_ref_6507
6507
*Nset, Nset=Reference_Point-1_rot_6508
6508
*Nset, Nset=Solid_part-2_fromEl
1, 2, 3, 4, 5, 6
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**
** Element sets ++++++++++++++++++++++++++++++++++++++++++++
**
*Elset, Elset=Internal-1_Internal_Selection-1_Contact_Pair-1_Master_S3
8, 20, 24, 28, 30, 60
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*Elset, Elset=Internal-1_Internal_Selection-1_Contact_Pair-1_Master_S2
21, 26, 34, 36, 40, 48
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*Elset, Elset=Internal-1_Internal_Selection-1_Contact_Pair-1_Master_S4
31, 51, 54, 66, 80, 90
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*Elset, Elset=Internal-1_Internal_Selection-1_Contact_Pair-1_Master_S1
38, 39, 42, 44, 45, 47
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*Elset, Elset=Internal-1_Internal_Selection-1_Contact_Pair-1_Slave_S1
1660, 1663, 1668, 1675, 1679, 1702
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*Elset, Elset=Internal-1_Internal_Selection-1_Contact_Pair-1_Slave_S3
1660, 1661, 1664, 1665, 1670, 1672
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*Elset, Elset=Internal-1_Internal_Selection-1_Contact_Pair-1_Slave_S2
1667, 1677, 1681, 1683, 1684, 1691
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*Elset, Elset=Internal-1_Internal_Selection-1_Contact_Pair-1_Slave_S4
1669, 1682, 1687, 1689, 1697, 1698
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**
** Surfaces ++++++++++++++++++++++++++++++++++++++++++++++++
**
*Surface, Name=Internal_Selection-1_Contact_Pair-1_Master, Type=Element
Internal-1_Internal_Selection-1_Contact_Pair-1_Master_S3, S3
Internal-1_Internal_Selection-1_Contact_Pair-1_Master_S2, S2
Internal-1_Internal_Selection-1_Contact_Pair-1_Master_S4, S4
Internal-1_Internal_Selection-1_Contact_Pair-1_Master_S1, S1
*Surface, Name=Internal_Selection-1_Contact_Pair-1_Slave, Type=Element
Internal-1_Internal_Selection-1_Contact_Pair-1_Slave_S1, S1
Internal-1_Internal_Selection-1_Contact_Pair-1_Slave_S3, S3
Internal-1_Internal_Selection-1_Contact_Pair-1_Slave_S2, S2
Internal-1_Internal_Selection-1_Contact_Pair-1_Slave_S4, S4
**
** Physical constants ++++++++++++++++++++++++++++++++++++++
**
**
** Materials +++++++++++++++++++++++++++++++++++++++++++++++
**
*Material, Name=S235
*Density
7.8E-09
*Elastic
210000, 0.28
*Expansion, Zero=20
1.1E-05
*Conductivity
14
*Specific heat
440000000
**
** Sections ++++++++++++++++++++++++++++++++++++++++++++++++
**
*Solid section, Elset=Solid_part-1, Material=S235
*Solid section, Elset=Solid_part-2, Material=S235
**
** Pre-tension sections ++++++++++++++++++++++++++++++++++++
**
**
** Constraints +++++++++++++++++++++++++++++++++++++++++++++
**
*Rigid body, Nset=Internal_Selection-1_Rigid_Body-1, Ref node=6507, Rot node=6508
**
** Surface interactions ++++++++++++++++++++++++++++++++++++
**
*Surface interaction, Name=Surface_Interaction-1
*Surface behavior, Pressure-overclosure=Hard
*Friction
0.25
**
** Contact pairs +++++++++++++++++++++++++++++++++++++++++++
**
*Contact pair, Interaction=Surface_Interaction-1, Type=Surface to surface, Adjust=0
Internal_Selection-1_Contact_Pair-1_Slave, Internal_Selection-1_Contact_Pair-1_Master
**
** Amplitudes ++++++++++++++++++++++++++++++++++++++++++++++
**
**
** Initial conditions ++++++++++++++++++++++++++++++++++++++
**
** Name: Velocity-1
*Initial conditions, Type=Velocity
Solid_part-2_fromEl, 3, -1000
**
** Steps +++++++++++++++++++++++++++++++++++++++++++++++++++
**
**
** Step-1 ++++++++++++++++++++++++++++++++++++++++++++++++++
**
*Step, Inc=1000
*Dynamic, Explicit=3
1E-06, 0.02, 1E-06, 1E+30
**
** Controls ++++++++++++++++++++++++++++++++++++++++++++++++
**
**
** Output frequency ++++++++++++++++++++++++++++++++++++++++
**
*Output, Frequency=200
**
** Boundary conditions +++++++++++++++++++++++++++++++++++++
**
*Boundary, op=New
** Name: Fixed-1
*Boundary
6507, 1, 3, 0
6508, 1, 3, 0
**
** Loads +++++++++++++++++++++++++++++++++++++++++++++++++++
**
*Cload, op=New
*Dload, op=New
**
** Defined fields ++++++++++++++++++++++++++++++++++++++++++
**
**
** History outputs +++++++++++++++++++++++++++++++++++++++++
**
**
** Field outputs +++++++++++++++++++++++++++++++++++++++++++
**
*Node file
RF, U, V
*El file
S, E, ENER, NOE
**
** End step ++++++++++++++++++++++++++++++++++++++++++++++++
**
*End step
